# OpenSim document version 30000
Model Lower Extremity:
  gravity: 0 -9.80665 0
  BodySet:
    Body ground: mass=0 mass_center=(0 0 0) inertia_xx=0 inertia_yy=0 inertia_zz=0 meshes=(sacrum.vtp pelvis.vtp)
    Body femur: mass=0 mass_center=(0 0 0) inertia_xx=0 inertia_yy=0 inertia_zz=0 meshes=femur.vtp
      CustomJoint hip: parent_body=ground location_in_parent=(-0.0707 -0.0661 0.0835) location=(0 0 0)
        Coordinate hip_flexion: motion_type=rotational default_value=0 range=(-0.1745329 2.094395) clamped=true
        Coordinate hip_adduction: motion_type=rotational default_value=0 range=(-0.8726646 0.5235988) clamped=true
        Coordinate hip_rotation: motion_type=rotational default_value=0 range=(-0.3490659 0.3490659) clamped=true
        SpatialTransform: axes_held_at_zero=(translation1 translation2 translation3)
          TransformAxis rotation1: coordinates=hip_flexion axis=(0 0 1) LinearFunction(coefficients=1 0)
          TransformAxis rotation2: coordinates=hip_adduction axis=(1 0 0) LinearFunction(coefficients=1 0)
          TransformAxis rotation3: coordinates=hip_rotation axis=(0 1 0) LinearFunction(coefficients=1 0)
    Body tibia: mass=0 mass_center=(0 0 0) inertia_xx=0 inertia_yy=0 inertia_zz=0 meshes=(tibia.vtp fibula.vtp)
      CustomJoint knee: parent_body=femur location_in_parent=(0 0 0) location=(0 0 0)
        Coordinate knee_angle: motion_type=rotational default_value=0 range=(-1.570796 0) clamped=true
        SpatialTransform: axes_held_at_zero=(rotation2 rotation3 translation3)
          TransformAxis rotation1: coordinates=knee_angle axis=(0 0 1) LinearFunction(coefficients=1 0)
          TransformAxis translation1: coordinates=knee_angle axis=(1 0 0)
            SimmSpline: x=(-2.0944 -1.74533 -1.39626 -1.0472 -0.698132 -0.349066 -0.174533 0)
                y=(-0.0032 0.00179 0.00411 0.0041 0.00212 -0.001 -0.0031 -0.00525)
          TransformAxis translation2: coordinates=knee_angle axis=(0 1 0)
            SimmSpline: x=(-2.0944 -1.22173 -0.523599 -0.349066 -0.174533 0)
                y=(-0.4226 -0.4082 -0.399 -0.3976 -0.3966 -0.396)
    Body patella: mass=0 mass_center=(0 0 0) inertia_xx=0 inertia_yy=0 inertia_zz=0 meshes=pat.vtp
      CustomJoint tib_pat: parent_body=tibia location_in_parent=(0 0 0) location=(0 0 0)
        Coordinate tib_pat_r3: motion_type=rotational default_value=-0.001169165 range=(-99999.9 99999.9) clamped=false
        Coordinate tib_pat_tx: motion_type=translational default_value=0.0496 range=(-99999.9 99999.9) clamped=false
        Coordinate tib_pat_ty: motion_type=translational default_value=-0.02268858 range=(-99999.9 99999.9)
            clamped=false
        Coordinate tib_pat_tz: motion_type=translational default_value=0.0024 range=(-99999.9 99999.9) clamped=false
        SpatialTransform: axes_held_at_zero=(rotation2 rotation3)
          TransformAxis rotation1: coordinates=tib_pat_r3 axis=(0 0 1) LinearFunction(coefficients=1 0)
          TransformAxis translation1: coordinates=tib_pat_tx axis=(1 0 0) LinearFunction(coefficients=1 0)
          TransformAxis translation2: coordinates=tib_pat_ty axis=(0 1 0) LinearFunction(coefficients=1 0)
          TransformAxis translation3: coordinates=tib_pat_tz axis=(0 0 1) LinearFunction(coefficients=1 0)
    Body talus: mass=0 mass_center=(0 0 0) inertia_xx=0 inertia_yy=0 inertia_zz=0 meshes=talus.vtp
      CustomJoint ankle: parent_body=tibia location_in_parent=(0 -0.43 0) location=(0 0 0)
        Coordinate ankle_angle: motion_type=rotational default_value=0 range=(-0.6981317 0.5759587) clamped=true
        SpatialTransform: axes_held_at_zero=(rotation2 rotation3 translation1 translation2 translation3)
          TransformAxis rotation1: coordinates=ankle_angle axis=(-0.1050135 -0.1740225 0.9791263)
              LinearFunction(coefficients=1 0)
    Body calcn: mass=0 mass_center=(0 0 0) inertia_xx=0 inertia_yy=0 inertia_zz=0 meshes=foot.vtp
      CustomJoint subtalar: parent_body=talus location_in_parent=(-0.04877 -0.04195 0.00792) location=(0 0 0)
        Coordinate subtalar_angle: motion_type=rotational default_value=0 range=(-0.3490659 0.3490659) clamped=true
        SpatialTransform: axes_held_at_zero=(rotation2 rotation3 translation1 translation2 translation3)
          TransformAxis rotation1: coordinates=subtalar_angle axis=(0.7871796 0.6047475 -0.1209495)
              LinearFunction(coefficients=1 0)
    Body toes: mass=0 mass_center=(0 0 0) inertia_xx=0 inertia_yy=0 inertia_zz=0 meshes=bofoot.vtp
      CustomJoint mtp: parent_body=calcn location_in_parent=(0.1788 -0.002 0.00108) location=(0 0 0)
        Coordinate mtp_angle: motion_type=rotational default_value=0 range=(-0.5235988 0.5235988) clamped=true
        SpatialTransform: axes_held_at_zero=(rotation2 rotation3 translation1 translation2 translation3)
          TransformAxis rotation1: coordinates=mtp_angle axis=(0.5809544 0 -0.8139361) LinearFunction(coefficients=1 0)
  ConstraintSet:
    CoordinateCouplerConstraint tib_pat_r3_con: independent_coordinate_names=knee_angle
        dependent_coordinate_name=tib_pat_r3
      coupled_coordinates_function: SimmSpline: x=(-2.0944 -1.99997 -1.45752 -0.526391 0.0279253 0.174533)
          y=(0.308051 0.308051 0.306305 0.270177 -0.037001 -0.279951)
    CoordinateCouplerConstraint tib_pat_tx_con: independent_coordinate_names=knee_angle
        dependent_coordinate_name=tib_pat_tx
      coupled_coordinates_function: SimmSpline: x=(-2.0944 -1.39626 -1.0472 -0.698132 -0.349066 -0.174533 0)
          y=(0.0173 0.0324 0.0381 0.043 0.0469 0.0484 0.0496)
    CoordinateCouplerConstraint tib_pat_ty_con: independent_coordinate_names=knee_angle
        dependent_coordinate_name=tib_pat_ty
      coupled_coordinates_function: SimmSpline: x=(-2.0944 -1.5708 -1.39626 -1.0472 -0.698132 -0.349066 -0.174533 0.00523599)
          y=(-0.0219 -0.0202 -0.02 -0.0204 -0.0211 -0.0219 -0.0223 -0.0227)
    CoordinateCouplerConstraint tib_pat_tz_con: independent_coordinate_names=knee_angle
        dependent_coordinate_name=tib_pat_tz
      coupled_coordinates_function: PiecewiseLinearFunction: x=(-17453.3 17453.3) y=(0.0024 0.0024)
  ForceSet:
    Schutte1993Muscle_Deprecated glut_med1: max_isometric_force=546 optimal_fiber_length=0.0535
        tendon_slack_length=0.078 pennation_angle_at_optimal=0.1396263 [radians]
      PathPoint P1: ground (-0.0408 0.0304 0.1209)
      PathPoint P2: femur (-0.0218 -0.0117 0.0555)
    Schutte1993Muscle_Deprecated glut_med2: max_isometric_force=382 optimal_fiber_length=0.0845
        tendon_slack_length=0.053 pennation_angle_at_optimal=0
      PathPoint P1: ground (-0.0855 0.0445 0.0766)
      PathPoint P2: femur (-0.0258 -0.0058 0.0527)
    Schutte1993Muscle_Deprecated glut_med3: max_isometric_force=435 optimal_fiber_length=0.0646
        tendon_slack_length=0.053 pennation_angle_at_optimal=0.3316126
      PathPoint P1: ground (-0.1223 0.0105 0.0648)
      PathPoint P2: femur (-0.0309 -0.0047 0.0518)
    Schutte1993Muscle_Deprecated glut_min1: max_isometric_force=180 optimal_fiber_length=0.068
        tendon_slack_length=0.016 pennation_angle_at_optimal=0.1745329
      PathPoint P1: ground (-0.0467 -0.008 0.1056)
      PathPoint P2: femur (-0.0072 -0.0104 0.056)
    Schutte1993Muscle_Deprecated glut_min2: max_isometric_force=190 optimal_fiber_length=0.056
        tendon_slack_length=0.026 pennation_angle_at_optimal=0
      PathPoint P1: ground (-0.0633 -0.0065 0.0991)
      PathPoint P2: femur (-0.0096 -0.0104 0.056)
    Schutte1993Muscle_Deprecated glut_min3: max_isometric_force=215 optimal_fiber_length=0.038
        tendon_slack_length=0.051 pennation_angle_at_optimal=0.01745329
      PathPoint P1: ground (-0.0834 -0.0063 0.0856)
      PathPoint P2: femur (-0.0135 -0.0083 0.055)
    Schutte1993Muscle_Deprecated semimem: max_isometric_force=1030 optimal_fiber_length=0.08 tendon_slack_length=0.359
        pennation_angle_at_optimal=0.2617994
      PathPoint P1: ground (-0.1192 -0.1015 0.0695)
      PathPoint P2: tibia (-0.0243 -0.0536 -0.0194)
    Schutte1993Muscle_Deprecated semiten: max_isometric_force=328 optimal_fiber_length=0.201 tendon_slack_length=0.262
        pennation_angle_at_optimal=0.08726646
      PathPoint P1: ground (-0.1237 -0.1043 0.0603)
      PathPoint P2: tibia (-0.0314 -0.0545 -0.0146)
      PathPoint P3: tibia (-0.0113 -0.0746 -0.0245)
      PathPoint P4: tibia (0.0027 -0.0956 -0.0193)
    Schutte1993Muscle_Deprecated bifemlh: max_isometric_force=717 optimal_fiber_length=0.109 tendon_slack_length=0.341
        pennation_angle_at_optimal=0
      PathPoint P1: ground (-0.1244 -0.1001 0.0666)
      PathPoint P2: tibia (-0.0081 -0.0729 0.0423)
    Schutte1993Muscle_Deprecated bifemsh: max_isometric_force=402 optimal_fiber_length=0.173 tendon_slack_length=0.1
        pennation_angle_at_optimal=0.4014257
      PathPoint P1: femur (0.005 -0.2111 0.0234)
      PathPoint P2: tibia (-0.0101 -0.0725 0.0406)
    Schutte1993Muscle_Deprecated sar: max_isometric_force=104 optimal_fiber_length=0.579 tendon_slack_length=0.04
        pennation_angle_at_optimal=0
      PathPoint P1: ground (-0.0153 -0.0013 0.1242)
      PathPoint P2: femur (-0.003 -0.3568 -0.0421)
      PathPoint P3: tibia (-0.0056 -0.0419 -0.0399)
      PathPoint P4: tibia (0.006 -0.0589 -0.0383)
      PathPoint P5: tibia (0.0243 -0.084 -0.0252)
    Schutte1993Muscle_Deprecated add_long: max_isometric_force=418 optimal_fiber_length=0.138 tendon_slack_length=0.11
        pennation_angle_at_optimal=0.1047198
      PathPoint P1: ground (-0.0316 -0.0836 0.0169)
      PathPoint P2: femur (0.005 -0.2111 0.0234)
    Schutte1993Muscle_Deprecated add_brev: max_isometric_force=286 optimal_fiber_length=0.133 tendon_slack_length=0.02
        pennation_angle_at_optimal=0
      PathPoint P1: ground (-0.0587 -0.0915 0.0164)
      PathPoint P2: femur (0.0009 -0.1196 0.0294)
    Schutte1993Muscle_Deprecated add_mag1: max_isometric_force=346 optimal_fiber_length=0.087 tendon_slack_length=0.06
        pennation_angle_at_optimal=0.08726646
      PathPoint P1: ground (-0.0732 -0.1174 0.0255)
      PathPoint P2: femur (-0.0045 -0.1211 0.0339)
    Schutte1993Muscle_Deprecated add_mag2: max_isometric_force=312 optimal_fiber_length=0.121 tendon_slack_length=0.13
        pennation_angle_at_optimal=0.05235988
      PathPoint P1: ground (-0.0831 -0.1192 0.0308)
      PathPoint P2: femur (0.0054 -0.2285 0.0227)
    Schutte1993Muscle_Deprecated add_mag3: max_isometric_force=444 optimal_fiber_length=0.131 tendon_slack_length=0.26
        pennation_angle_at_optimal=0.08726646
      PathPoint P1: ground (-0.0771 -0.1181 0.0276)
      PathPoint P2: femur (0.007 -0.3837 -0.0266)
    Schutte1993Muscle_Deprecated tfl: max_isometric_force=155 optimal_fiber_length=0.095 tendon_slack_length=0.425
        pennation_angle_at_optimal=0.05235988
      PathPoint P1: ground (-0.0311 0.0214 0.1241)
      PathPoint P2: femur (0.0294 -0.0995 0.0597)
      PathPoint P3: femur (0.0054 -0.4049 0.0357)
      PathPoint P4: tibia (0.006 -0.0487 0.0297)
    Schutte1993Muscle_Deprecated pect: max_isometric_force=177 optimal_fiber_length=0.133 tendon_slack_length=0.001
        pennation_angle_at_optimal=0
      PathPoint P1: ground (-0.0431 -0.0768 0.0451)
      PathPoint P2: femur (-0.0122 -0.0822 0.0253)
    Schutte1993Muscle_Deprecated grac: max_isometric_force=108 optimal_fiber_length=0.352 tendon_slack_length=0.14
        pennation_angle_at_optimal=0.05235988
      PathPoint P1: ground (-0.0563 -0.1038 0.0079)
      PathPoint P2: tibia (-0.0154 -0.0475 -0.0358)
      PathPoint P3: tibia (0.006 -0.0836 -0.0228)
    Schutte1993Muscle_Deprecated glut_max1: max_isometric_force=382 optimal_fiber_length=0.142
        tendon_slack_length=0.125 pennation_angle_at_optimal=0.08726646
      PathPoint P1: ground (-0.1195 0.0612 0.07)
      PathPoint P2: ground (-0.1291 0.0012 0.0886)
      PathPoint P3: femur (-0.0457 -0.0248 0.0392)
      PathPoint P4: femur (-0.0277 -0.0566 0.047)
    Schutte1993Muscle_Deprecated glut_max2: max_isometric_force=546 optimal_fiber_length=0.147
        tendon_slack_length=0.127 pennation_angle_at_optimal=0
      PathPoint P1: ground (-0.1349 0.0176 0.0563)
      PathPoint P2: ground (-0.1376 -0.052 0.0914)
      PathPoint P3: femur (-0.0426 -0.053 0.0293)
      PathPoint P4: femur (-0.0156 -0.1016 0.0419)
    Schutte1993Muscle_Deprecated glut_max3: max_isometric_force=368 optimal_fiber_length=0.144
        tendon_slack_length=0.145 pennation_angle_at_optimal=0.08726646
      PathPoint P1: ground (-0.1556 -0.0314 0.0058)
      PathPoint P2: ground (-0.1529 -0.1052 0.0403)
      PathPoint P3: femur (-0.0299 -0.1041 0.0135)
      PathPoint P4: femur (-0.006 -0.1419 0.0411)
    Schutte1993Muscle_Deprecated iliacus: max_isometric_force=429 optimal_fiber_length=0.1 tendon_slack_length=0.09
        pennation_angle_at_optimal=0.122173
      PathPoint P1: ground (-0.0674 0.0365 0.0854)
      PathPoint P2: ground (-0.0218 -0.055 0.0851)
      PathPoint P3: femur (0.0017 -0.0543 0.0057)
      PathPoint P4: femur (-0.0193 -0.0621 0.0129)
    Schutte1993Muscle_Deprecated psoas: max_isometric_force=371 optimal_fiber_length=0.104 tendon_slack_length=0.13
        pennation_angle_at_optimal=0.1396263
      PathPoint P1: ground (-0.0647 0.0887 0.0289)
      PathPoint P2: ground (-0.0238 -0.057 0.0759)
      PathPoint P3: femur (0.0016 -0.0507 0.0038)
      PathPoint P4: femur (-0.0188 -0.0597 0.0104)
    Schutte1993Muscle_Deprecated quad_fem: max_isometric_force=254 optimal_fiber_length=0.054 tendon_slack_length=0.024
        pennation_angle_at_optimal=0
      PathPoint P1: ground (-0.1143 -0.1151 0.052)
      PathPoint P2: femur (-0.0381 -0.0359 0.0366)
    Schutte1993Muscle_Deprecated gem: max_isometric_force=109 optimal_fiber_length=0.024 tendon_slack_length=0.039
        pennation_angle_at_optimal=0
      PathPoint P1: ground (-0.1133 -0.082 0.0714)
      PathPoint P2: femur (-0.0142 -0.0033 0.0443)
    Schutte1993Muscle_Deprecated peri: max_isometric_force=296 optimal_fiber_length=0.026 tendon_slack_length=0.115
        pennation_angle_at_optimal=0.1745329
      PathPoint P1: ground (-0.1396 0.0003 0.0235)
      PathPoint P2: ground (-0.1193 -0.0276 0.0657)
      PathPoint P3: femur (-0.0148 -0.0036 0.0437)
    Schutte1993Muscle_Deprecated rect_fem: max_isometric_force=779 optimal_fiber_length=0.084 tendon_slack_length=0.346
        pennation_angle_at_optimal=0.08726646
      PathPoint P1: ground (-0.0295 -0.0311 0.0968)
      ConditionalPathPoint P2: femur (0.0334 -0.403 0.0019) range=(-2.61799 -1.45997) coordinate=knee_angle
      PathPoint P3: patella (0.0121 0.0437 -0.001)
    Schutte1993Muscle_Deprecated vas_med: max_isometric_force=1294 optimal_fiber_length=0.089 tendon_slack_length=0.126
        pennation_angle_at_optimal=0.08726646
      PathPoint P1: femur (0.014 -0.2099 0.0188)
      PathPoint P2: femur (0.0356 -0.2769 0.0009)
      ConditionalPathPoint P3: femur (0.037 -0.4048 -0.0125) range=(-2.61799 -1.21004) coordinate=knee_angle
      ConditionalPathPoint P4: femur (0.0274 -0.4255 -0.0131) range=(-2.61799 -1.78006) coordinate=knee_angle
      PathPoint P5: patella (0.0063 0.0445 -0.017)
    Schutte1993Muscle_Deprecated vas_int: max_isometric_force=1365 optimal_fiber_length=0.087 tendon_slack_length=0.136
        pennation_angle_at_optimal=0.05235988
      PathPoint P1: femur (0.029 -0.1924 0.031)
      PathPoint P2: femur (0.0335 -0.2084 0.0285)
      ConditionalPathPoint P3: femur (0.0343 -0.403 0.0055) range=(-2.61799 -1.42) coordinate=knee_angle
      PathPoint P4: patella (0.0058 0.048 -0.0006)
    Schutte1993Muscle_Deprecated vas_lat: max_isometric_force=1871 optimal_fiber_length=0.084 tendon_slack_length=0.157
        pennation_angle_at_optimal=0.08726646
      PathPoint P1: femur (0.0048 -0.1854 0.0349)
      PathPoint P2: femur (0.0269 -0.2591 0.0409)
      ConditionalPathPoint P3: femur (0.0361 -0.403 0.0205) range=(-2.61799 -1.21004) coordinate=knee_angle
      ConditionalPathPoint P4: femur (0.0253 -0.4243 0.0184) range=(-2.61799 -1.92004) coordinate=knee_angle
      PathPoint P5: patella (0.0103 0.0423 0.0141)
    Schutte1993Muscle_Deprecated med_gas: max_isometric_force=1113 optimal_fiber_length=0.045 tendon_slack_length=0.408
        pennation_angle_at_optimal=0.296706
      PathPoint P1: femur (-0.0127 -0.3929 -0.0235)
      ConditionalPathPoint P2: femur (-0.0239 -0.4022 -0.0258) range=(-0.770039 0.100007) coordinate=knee_angle
      PathPoint P3: tibia (-0.0217 -0.0487 -0.0295)
      PathPoint P4: calcn (0.0044 0.031 -0.0053)
    Schutte1993Muscle_Deprecated lat_gas: max_isometric_force=488 optimal_fiber_length=0.064 tendon_slack_length=0.385
        pennation_angle_at_optimal=0.1396263
      PathPoint P1: femur (-0.0155 -0.3946 0.0272)
      ConditionalPathPoint P2: femur (-0.0254 -0.4018 0.0274) range=(-0.770039 0.100007) coordinate=knee_angle
      PathPoint P3: tibia (-0.0242 -0.0481 0.0235)
      PathPoint P4: calcn (0.0044 0.031 -0.0053)
    Schutte1993Muscle_Deprecated soleus: max_isometric_force=2839 optimal_fiber_length=0.03 tendon_slack_length=0.268
        pennation_angle_at_optimal=0.4363323
      PathPoint P1: tibia (-0.002 -0.1533 0.0071)
      PathPoint P2: calcn (0.004 0.031 -0.005)
    Schutte1993Muscle_Deprecated solstiff: max_isometric_force=2839 optimal_fiber_length=0.03 tendon_slack_length=0.268
        pennation_angle_at_optimal=0.4363323
      PathPoint P1: tibia (-0.0024 -0.1533 0.0071)
      PathPoint P2: calcn (0.0044 0.031 -0.0053)
      tendon_force_length_curve: SimmSpline: x=(-10 -0.002 -0.001 0 0.0013 0.0028 0.0043 0.0058 0.0073 0.0088 0.01 0.012 0.013 9.2 9.2)
          y=(0 0 0 0 1.1 2.6 4.3 6.5 9.1 12.3 16.1 20.8 22.7 34500 34500)
    Schutte1993Muscle_Deprecated tib_post: max_isometric_force=1270 optimal_fiber_length=0.031 tendon_slack_length=0.31
        pennation_angle_at_optimal=0.2094395
      PathPoint P1: tibia (-0.0094 -0.1348 0.0019)
      PathPoint P2: tibia (-0.0144 -0.4051 -0.0229)
      PathPoint P3: calcn (0.0417 0.0334 -0.0286)
      PathPoint P4: calcn (0.0772 0.0159 -0.0281)
    Schutte1993Muscle_Deprecated flex_dig: max_isometric_force=310 optimal_fiber_length=0.034 tendon_slack_length=0.4
        pennation_angle_at_optimal=0.122173
      PathPoint P1: tibia (-0.0083 -0.2046 -0.0018)
      PathPoint P2: tibia (-0.0154 -0.4051 -0.0196)
      PathPoint P3: calcn (0.0436 0.0315 -0.028)
      PathPoint P4: calcn (0.0708 0.0176 -0.0263)
      PathPoint P5: calcn (0.1658 -0.0081 0.0116)
      PathPoint P6: toes (-0.0019 -0.0078 0.0147)
      PathPoint P7: toes (0.0285 -0.0071 0.0215)
      PathPoint P8: toes (0.0441 -0.006 0.0242)
    Schutte1993Muscle_Deprecated flex_hal: max_isometric_force=322 optimal_fiber_length=0.043 tendon_slack_length=0.38
        pennation_angle_at_optimal=0.1745329
      PathPoint P1: tibia (-0.0079 -0.2334 0.0244)
      PathPoint P2: tibia (-0.0186 -0.4079 -0.0174)
      PathPoint P3: calcn (0.0374 0.0276 -0.0241)
      PathPoint P4: calcn (0.1038 0.0068 -0.0256)
      PathPoint P5: calcn (0.1726 -0.0053 -0.0269)
      PathPoint P6: toes (0.0155 -0.0064 -0.0265)
      PathPoint P7: toes (0.0562 -0.0102 -0.0181)
    Schutte1993Muscle_Deprecated tib_ant: max_isometric_force=603 optimal_fiber_length=0.098 tendon_slack_length=0.223
        pennation_angle_at_optimal=0.08726646
      PathPoint P1: tibia (0.0179 -0.1624 0.0115)
      PathPoint P2: tibia (0.0329 -0.3951 -0.0177)
      PathPoint P3: calcn (0.1166 0.0178 -0.0305)
    Schutte1993Muscle_Deprecated per_brev: max_isometric_force=348 optimal_fiber_length=0.05 tendon_slack_length=0.161
        pennation_angle_at_optimal=0.08726646
      PathPoint P1: tibia (-0.007 -0.2646 0.0325)
      PathPoint P2: tibia (-0.0198 -0.4184 0.0283)
      PathPoint P3: tibia (-0.0144 -0.4295 0.0289)
      PathPoint P4: calcn (0.0471 0.027 0.0233)
      PathPoint P5: calcn (0.0677 0.0219 0.0343)
    Schutte1993Muscle_Deprecated per_long: max_isometric_force=754 optimal_fiber_length=0.049 tendon_slack_length=0.345
        pennation_angle_at_optimal=0.1745329
      PathPoint P1: tibia (0.0005 -0.1568 0.0362)
      PathPoint P2: tibia (-0.0207 -0.4205 0.0286)
      PathPoint P3: tibia (-0.0162 -0.4319 0.0289)
      PathPoint P4: calcn (0.0438 0.023 0.0221)
      PathPoint P5: calcn (0.0681 0.0106 0.0284)
      PathPoint P6: calcn (0.0852 0.0069 0.0118)
      PathPoint P7: calcn (0.1203 0.0085 -0.0184)
    Schutte1993Muscle_Deprecated per_tert: max_isometric_force=90 optimal_fiber_length=0.079 tendon_slack_length=0.1
        pennation_angle_at_optimal=0.2268928
      PathPoint P1: tibia (0.001 -0.2804 0.0231)
      PathPoint P2: tibia (0.0229 -0.4069 0.0159)
      PathPoint P3: calcn (0.0857 0.0228 0.0299)
    Schutte1993Muscle_Deprecated ext_dig: max_isometric_force=341 optimal_fiber_length=0.102 tendon_slack_length=0.345
        pennation_angle_at_optimal=0.1396263
      PathPoint P1: tibia (0.0032 -0.1381 0.0276)
      PathPoint P2: tibia (0.0289 -0.4007 0.0072)
      PathPoint P3: calcn (0.0922 0.0388 -0.0001)
      PathPoint P4: calcn (0.1616 0.0055 0.013)
      PathPoint P5: toes (0.0003 0.0047 0.0153)
      PathPoint P6: toes (0.0443 -0.0004 0.025)
    Schutte1993Muscle_Deprecated ext_hal: max_isometric_force=108 optimal_fiber_length=0.111 tendon_slack_length=0.305
        pennation_angle_at_optimal=0.1047198
      PathPoint P1: tibia (0.0012 -0.1767 0.0228)
      PathPoint P2: tibia (0.0326 -0.3985 -0.0085)
      PathPoint P3: calcn (0.097 0.0389 -0.0211)
      PathPoint P4: calcn (0.1293 0.0309 -0.0257)
      PathPoint P5: calcn (0.1734 0.0139 -0.028)
      PathPoint P6: toes (0.0298 0.0041 -0.0245)
      PathPoint P7: toes (0.0563 0.0034 -0.0186)
    Schutte1993Muscle_Deprecated pat_lig: max_isometric_force=1 optimal_fiber_length=0.05 tendon_slack_length=0.005
        pennation_angle_at_optimal=0
      PathPoint P1: tibia (0.039 -0.0822 0)
      PathPoint P2: patella (0.0021 0.0015 0.0001)
    ObjectGroup hip_abd: members=(glut_max1 glut_med1 glut_med2 glut_med3 glut_min1 glut_min2 glut_min3 peri sar tfl)
    ObjectGroup hip_flex: members=(add_brev add_long glut_med1 glut_min1 grac iliacus pect psoas rect_fem sar tfl)
    ObjectGroup hip_inrot: members=(glut_med1 glut_min1 iliacus psoas tfl)
    ObjectGroup hip_exrot: members=(gem glut_med3 glut_min3 peri quad_fem)
    ObjectGroup hip_ext: members=(add_long add_mag1 add_mag2 add_mag3 bifemlh glut_max1 glut_max2 glut_max3 glut_med3 glut_min3 semimem semiten)
    ObjectGroup hip_add: members=(add_brev add_long add_mag1 add_mag2 add_mag3 bifemlh grac pect semimem semiten)
    ObjectGroup knee_bend: members=(bifemlh bifemsh grac lat_gas med_gas sar semimem semiten)
    ObjectGroup knee_ext: members=(pat_lig rect_fem vas_int vas_lat vas_med)
    ObjectGroup ankle_pf: members=(flex_dig flex_hal lat_gas med_gas per_brev per_long soleus tib_post)
    ObjectGroup inverter: members=(ext_hal flex_dig flex_hal tib_ant tib_post)
    ObjectGroup ankle_df: members=(ext_dig ext_hal per_tert tib_ant)
    ObjectGroup everter: members=(ext_dig per_brev per_long per_tert)
  MarkerSet:
    Marker LJC: ground (-0.1055 0.072 0)
    Marker HJC: ground (-0.0707 -0.0661 0.0835)
    Marker LPSIS: ground (-0.148 0 -0.047)
    Marker RPSIS: ground (-0.148 0 0.047)
    Marker LASIS: ground (0 0 -0.128)
    Marker RASIS: ground (0 0 0.128)
    Marker TROC: ground (-0.0712 -0.1081 0.1765)
    Marker LFE: ground (-0.0707 -0.4701 0.1335)
    Marker MFE: ground (-0.0707 -0.4701 0.0335)
    Marker LM: ground (-0.08095 -0.8721 0.1365)
    Marker MM: ground (-0.06995 -0.8509 0.0455)
    Marker FH: ground (-0.05035 -0.50367 0.14326)
    Marker TT: ground (-0.03695 -0.5441 0.0835)
    Marker M1: ground (0.05 -0.93 0.045)
    Marker M5: ground (0.007 -0.93 0.143)
    Marker HEEL: ground (-0.142 -0.927 0.085)
